*Heading
** Job name: aqua Model name: Model-1
** Generated by: Abaqus/CAE 2018
*Preprint, echo=NO, model=NO, history=NO, contact=NO
**
** PARTS
**
*Part, name=structure
*Node
      1,       -1000.,        1000.,        2000.
      2,       -1000.,        1000.,           0.
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*Element, type=B31
 1,  1, 11
 2, 11, 12
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*Nset, nset=_PickedSet7, internal, generate
   1,  983,    1
*Elset, elset=_PickedSet7, internal, generate
   1,  990,    1
** Region: (beam:Picked), (Beam Orientation:Picked)
*Elset, elset=_I1, internal
   1,   2,   3,   4,   5,   6
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** Section: beam  Profile: circular
*Beam Section, elset=_I1, material=arbitrary, temperature=GRADIENTS, section=CIRC
50.
1.,0.,0.
** Region: (beam:Picked), (Beam Orientation:Picked)
*Elset, elset=_I2, internal
  51,  52,  53,  54,  55,  56
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** Section: beam  Profile: circular
*Beam Section, elset=_I2, material=arbitrary, temperature=GRADIENTS, section=CIRC
50.
0.,0.,-1.
*End Part
**
*Part, name=wave
*Node
      1,        2500.,        2500.,           0.
      2,        2460.,        2500.,           0.
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*Element, type=SFM3D4
    1,     1,     2,   128,   127
    2,     2,     3,   129,   128
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*Elset, elset=Set-1, generate
     1,  15625,      1
*SURFACE SECTION, ELSET=Set-1, AQUAVISUALIZATION=YES
*End Part
**
**
** ASSEMBLY
**
*Assembly, name=Assembly
**
*Instance, name=structure-1, part=structure
          0.,           0.,       10000.
*End Instance
**
*Instance, name=wave-1, part=wave
          0.,           0.,        8000.
*End Instance
**
*Nset, nset=_PickedSet6, internal, instance=structure-1
 10,
*Nset, nset=_PickedSet7, internal, instance=structure-1, generate
   1,  983,    1
*Elset, elset=_PickedSet7, internal, instance=structure-1, generate
   1,  990,    1
*End Assembly
**
** MATERIALS
**
*Material, name=arbitrary
*Density
 7.9e-09,
*Elastic
5175., 0.3
**
** BOUNDARY CONDITIONS
**
** Name: bc Type: Displacement/Rotation
*Boundary
_PickedSet6, 1, 1
_PickedSet6, 2, 2
_PickedSet6, 3, 3
_PickedSet6, 4, 4
_PickedSet6, 5, 5
_PickedSet6, 6, 6
** ----------------------------------------------------------------
**
** STEP: dynamic
*AQUA
0., 8000.,9810., 1.025e-9
0.0, 0.0, 0.0, 0.0
100., 0.0, 0.0, 8000.
*WAVE, TYPE=AIRY
1000., 20000., 0., 1., 0.
100., 2500., 0., 0.707, 0.707
**
*Step, name=dynamic, nlgeom=YES, inc=1000
*Dynamic
0.01,10.,0.0001,0.01
**
** LOADS
**
** Name: fdd   Type: Line load
*Dload
_PickedSet7, FDD, 1.0, 100., 0.47, 1.0
**
** OUTPUT REQUESTS
**
*Restart, write, frequency=0
**
** FIELD OUTPUT: F-Output-1
**
*Output, field, variable=PRESELECT, time interval=0.01
**
** HISTORY OUTPUT: H-Output-1
**
*Output, history, variable=PRESELECT
*End Step
