*Heading
** Job name: under Model name: Model-1
** Generated by: Abaqus/CAE 2018
*Preprint, echo=NO, model=NO, history=NO, contact=NO
**
** PARTS
**
*Part, name=box
*Node
      1,        1000.,        1000.,        1000.
      2,        1000.,        1000.,           0.
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*Element, type=B31
 1,  1,  9
 2,  9, 10
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*Nset, nset=Wire-3-Set-1
   1,   2,   3,   4,   5,   6
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*Elset, elset=Wire-3-Set-1
   1,   2,   3,   4,   5,   6
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*Nset, nset=_PickedSet6, internal, generate
   1,  236,    1
*Elset, elset=_PickedSet6, internal, generate
   1,  240,    1
** Region: (beam:Picked), (Beam Orientation:Picked)
*Elset, elset=_I1, internal
   1,   2,   3,   4,   5,   6
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** Section: beam  Profile: circular
*Beam Section, elset=_I1, material=Material-1, temperature=GRADIENTS, section=CIRC
100.
1.,0.,0.
** Region: (beam:Picked), (Beam Orientation:Picked)
*Elset, elset=_I2, internal
  21,  22,  23,  24,  25,  26
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** Section: beam  Profile: circular
*Beam Section, elset=_I2, material=Material-1, temperature=GRADIENTS, section=CIRC
100.
0.,0.,-1.
*End Part
**
*Part, name=wave
*Node
      1,           0.,           0.,           0.
      2,         100.,           0.,           0.
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*Element, type=SFM3D4
    1,     1,     2,   103,   102
    2,     2,     3,   104,   103
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*Elset, elset=Set-1, generate
     1,  10000,      1
*SURFACE SECTION, ELSET=Set-1, AQUAVISUALIZATION=YES
*End Part
**
**
** ASSEMBLY
**
*Assembly, name=Assembly
**
*Instance, name=box-1, part=box
       -500.,        -500.,        8700.
*End Instance
**
*Instance, name=wave-1, part=wave
      -5000.,       -5000.,       10000.
*End Instance
**
*Nset, nset=_PickedSet11, internal, instance=box-1, generate
   1,  236,    1
*Elset, elset=_PickedSet11, internal, instance=box-1, generate
   1,  240,    1
*End Assembly
**
** MATERIALS
**
** lighter than water
*Material, name=Material-1
*Density
 5e-10,
*Elastic
207000., 0.3
** ----------------------------------------------------------------
**
*AQUA
0.,10000.,9810.,1.025e-9
0.0,0.0,0.0,0.0
0.1,0.0,0.0,10000.0
*WAVE, TYPE=AIRY
125.,2000.,0,1,0
100.,1500.,0,0.707,0.707
** STEP: Step-1
**
*Step, name=Step-1, nlgeom=YES, inc=1000
*Dynamic
0.01,10.,0.0001,0.1
**
** LOADS
**
** Name: Load-1   Type: Line load
*Dload
_PickedSet11, FDD, 1.0, 200., 0.47, 1.0
**
*Dload
_PickedSet11, Pb, 1.0, 200
** Name: gravity   Type: Gravity
*Dload
, GRAV, 9810., 0., 0., -1.
**
** OUTPUT REQUESTS
**
*Restart, write, frequency=0
**
** FIELD OUTPUT: F-Output-1
**
*Output, field, variable=PRESELECT, time interval=0.1
**
** HISTORY OUTPUT: H-Output-1
**
*Output, history, variable=PRESELECT
*End Step
